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/BATCH
/COM,ANSYS RELEASE Release 18.2      BUILD 18.2      UP20170726       14:52:47
/input,menust,tmp,''
/GST,ON
/PLO,INFO,3
/GRO,CURL,ON
/CPLANE,1
WPSTYLE,,,,,,,,0
RESUME
/COM,ANSYS RELEASE Release 18.2      BUILD 18.2      UP20170726       14:52:52
/NUMBER,0
/NUMBER,0
/SOLU
FINISH
/PREP7
/NUMBER,0
/NUMBER,0
/NUMBER,0
/NUMBER,0
/NUMBER,0
MPTEMP,,,,,,,,
MPTEMP,1,0
MPDE,DENS,1
MPDATA,DENS,1,,2500
R,3,30000000,0,0, , ,0,
RMORE,0,
FLST,2,7,4,ORDE,2
FITEM,2,1
FITEM,2,-7
LMESH,P51X
/NUMBER,0
SAVE
SAVE
SAVE
FINISH
! /EXIT,ALL
/BATCH
/COM,ANSYS RELEASE Release 18.2      BUILD 18.2      UP20170726       15:45:43
/input,menust,tmp,''
/GST,ON
/PLO,INFO,3
/GRO,CURL,ON
/CPLANE,1
WPSTYLE,,,,,,,,0
RESUME
/COM,ANSYS RELEASE Release 18.2      BUILD 18.2      UP20170726       15:45:46
/POST1
FINISH
/SOL
FINISH
/PREP7
FINISH
! /EXIT,NOSAV
/BATCH
